folder simulations: version=37; creator=Apsim 7.10-r0
  simulation
    metfile met: filename=46.01_29.76.met
    clock
      start_date = 01/01/2004  # Enter the start date of the simulation
      end_date = 31/12/2004  # Enter the end date of the simulation
    summaryfile
    area paddock
      Soil: Latitude=0; Longitude=0; YearOfSampling=0
        InitialWater Initial water: FractionFull=0.95; PercentMethod=FilledFromTop; RelativeTo=ll15
        Water
          Thickness  BD    AirDry  LL15  DUL   SAT
          100        1.35  0.04    0.11  0.22  0.3
          100        1.35  0.14    0.14  0.25  0.3
          100        1.35  0.15    0.16  0.27  0.32
          200        1.4   0.16    0.17  0.28  0.33
          200        1.4   0.18    0.19  0.3   0.34
          200        1.4   0.18    0.2   0.3   0.35
          200        1.4   0.18    0.2   0.31  0.36
          200        1.4   0.18    0.2   0.32  0.37
          200        1.4   0.18    0.2   0.31  0.37
          200        1.4   0.18    0.2   0.31  0.37
          SoilCrop sunflower
            LL=[0.11, 0.14, 0.16, 0.17, 0.19, 0.2, 0.2, 0.2, 0.2, 0.2]
            KL=[0.08, 0.08, 0.08, 0.08, 0.06, 0.04, 0.03, 0.02, 0.01, 0.01]
            XF=[1, 1, 1, 1, 1, 1, 1, 1, 1, 1]
          SoilCrop maize
            LL=[0.11, 0.14, 0.16, 0.17, 0.19, 0.2, 0.2, 0.2, 0.2, 0.2]
            KL=[0.08, 0.08, 0.08, 0.08, 0.06, 0.04, 0.03, 0.02, 0.01, 0.01]
            XF=[1, 1, 1, 1, 1, 1, 1, 1, 1, 1]
        SoilWater: SummerCona=2.5; SummerU=9; SummerDate=1-Nov; WinterCona=2.5; WinterU=9; WinterDate=1-Apr; DiffusConst=88; DiffusSlope=35.4; Salb=0.13; CN2Bare=75; CNRed=20; CNCov=0.8; Thickness=[100, 100, 100, 200, 200, 200, 200, 200, 200, 200]; SWCON=[0.5, 0.5, 0.5, 0.5, 0.5, 0.5, 0.5, 0.5, 0.5, 0.5]
        SoilOrganicMatter: RootCN=45; RootWt=1000; SoilCN=14.5; EnrACoeff=7.4; EnrBCoeff=0.2; OCUnits=Total
          Thickness  OC    FBiom  FInert
          100        1.2   0.02   0.6
          100        1     0.01   0.65
          100        0.86  0.01   0.7
          200        0.83  0.01   0.75
          200        0.58  0.01   0.8
          200        0.54  0.01   0.85
          200        0.47  0.01   0.93
          200        0.5   0.01   0.93
          200        0.5   0.01   0.93
          200        0.5   0.01   0.93
        Analysis: Thickness=[100, 100, 100, 200, 200, 200, 200, 200, 200, 200]; PH=[6, 6, 6, 6.2, 6.5, 6.7, 6.8, 6.8, 6.8, 6.8]; PHUnits=Water; BoronUnits=HotWater
        Sample Initial nitrogen: NO3Units=kgha; NH4Units=ppm; SWUnits=Volumetric; OCUnits=Total; PHUnits=Water
          Thickness  NO3  NH4
          100        30   0
          100        20   0
          100        10   0
          200        5    0
          200        5    0
          200        1    0
          200        1    0
          200        1    0
          200        1    0
          200        1    0
      surfaceom SurfaceOrganicMatter
        PoolName = wheat  # Organic Matter pool name
        type = wheat  # Organic Matter type
        mass = 0  # Initial surface residue (kg/ha)
        cnr = 80.0  # C:N ratio of initial residue
        standing_fraction = 0.0  # Fraction of residue standing
      fertiliser
      maize
      sunflower
      folder Manager folder
        manager2 Setup
          thisCrop = Sunflower  # Crop to simulate
          csvFile = Baseline_with_SM.csv  # CSV file of treatments
          thisStation = 46.01_29.76  # Station Name (lat_lng)
```csharp
using System;
using System.Text;

using System.Collections.Generic;
using System.IO;
using ModelFramework;

public class Script 
{      
   [Link] public Simulation simulation;
   [Link] public Paddock paddock;
   [Input] DateTime Today; 
   [Param] string csvFile;
   [Param, Output] string thisCrop;
   [Param, Output] string thisStation;
   [Output] int thisYear;
   
   private Dictionary<string, string> cultivar;
   private Dictionary<string, double> density;
   private double row_spacing = 500; //mm
   private double depth = 30; // sowing depth (mm)
   [Output] private DateTime sowingDate;   
   
   [EventHandler] public void OnInitialised()
   {
      // set up the dictionaries for crop-specific details
      cultivar = new Dictionary<string, string>();
      cultivar.Add("Maize", "medium");
      cultivar.Add("Sunflower", "Medium");

      density = new Dictionary<string, double>(); // plants / sq meter
      density.Add("Maize", 4);
      density.Add("Sunflower", 3);
      
      bool found = false;

      Component clockModule = (Component) simulation.LinkByName("clock");
      clockModule.Get("year", out thisYear);
      
      // Read the table of sowing dates
      using (StreamReader sr = new StreamReader(csvFile))
      {
         List<string> headers = SplitStringHonouringQuotes(sr.ReadLine(), ",");
         var latCol = headers.IndexOf("Lat");
         if (latCol < 0) {throw new Exception("Missing Latitude");}
         
         var longCol = headers.IndexOf("Long");
         if (longCol < 0) {throw new Exception("Missing Longitude");}
                
         var yearCol = headers.IndexOf("year");
         if (yearCol < 0) {throw new Exception("Missing year column");}

         var cropCol = headers.IndexOf("crop");
         if (cropCol < 0) {throw new Exception("Missing crop column");}
         var lineCnt = 1;

         while (!sr.EndOfStream)
         {
            string[] row = SplitStringHonouringQuotes(sr.ReadLine(), ",").ToArray();
            double rowYear = 0;
            Double.TryParse(row[yearCol], out rowYear);
            
            if (thisStation == row[latCol].ToString() + "_" + row[longCol].ToString() &&
                thisYear == rowYear &&
                thisCrop.ToLower() == row[cropCol].ToLower()) {
               
               Console.WriteLine("Found row on line " + lineCnt.ToString());
               found = true;
               var dCol = headers.IndexOf("datsow");
               if (dCol < 0) {throw new Exception("Missing sowing date column");}

               sowingDate = DateTime.Parse(row[dCol]);
            }
            lineCnt++;
         }
      }
      if (!found) {
         throw new Exception("No treatment data for year = " + thisYear + ", crop = " + thisCrop + ", station = " + thisStation );
      }
   }

   [EventHandler] public void OnPrepare()
   {
      //Console.WriteLine("Today = " + Today.ToString("dd/MM/yyyy") + " vs " + datsow.ToString("dd/MM/yyyy"));
      if (DateTime.Compare(sowingDate, Today) == 0) {
         DoSowCrop();
      }
   }
   
   [EventHandler] public void OnPost()
   {
      Component cropModule = (Component) paddock.LinkByName(thisCrop);
      string plantStatus = "";
      cropModule.Get("plant_status", out plantStatus);
      if (plantStatus != "out") {
         string StageName = "";
         cropModule.Get("StageName", out StageName);
         if (StageName == "harvest_ripe" || plantStatus == "dead") {
            DoHarvestCrop();
         }
      }
   }
   
   [EventHandler, Description("Sow the crop")] public void DoSowCrop()
   {
      Console.WriteLine(Today.ToString("dd/MM/yyyy") + " Sowing Crop");
      SowType data = new SowType();
      data.Cultivar = cultivar[thisCrop];

      data.plants = density[thisCrop];
      data.sowing_depth = depth;
      data.row_spacing = row_spacing;
      string currentPaddock;
      
      Component cropModule = (Component) paddock.LinkByName(thisCrop);

      cropModule.Publish("Sow", data);
   }


   public void DoHarvestCrop()
   {
      Console.WriteLine(Today + " Harvesting Crop");
      HarvestType hdata = new HarvestType();
      hdata.Remove = 0.0;
      Component cropModule = (Component) paddock.LinkByName(thisCrop);
      cropModule.Publish("harvest", hdata);

      KillCropType kdata = new KillCropType();
      kdata.KillFraction = 0.0F;
      cropModule.Publish("killcrop", kdata);
      cropModule.Publish("end_crop");
   } 

   
/////////// Helpers   
   /// This method splits values on a comma but also honours double quotes
   /// ensuring something in double quotes is never split.
   ///     eg: if text = value1, "value 2, 2a", value3
   ///     then: words[0] = value1
   ///           words[1] = value2, 2a
   ///           words[2] = value3
   /// All values returned have been trimmed of spaces and double quotes.
   /// </summary>
   public List<string> SplitStringHonouringQuotes(string text, string delimiters)
   {
      List<string> ReturnStrings = new List<string>();
      if (text.Trim() == "")
         return ReturnStrings;

      bool InsideQuotes = false;
      int Start = IndexNotOfAny(text, " ".ToCharArray());
      for (int i = Start; i < text.Length; i++)
      {
         if (text[i] == '"')
            InsideQuotes = !InsideQuotes; // toggle

         else if (!InsideQuotes)
         {
            if (delimiters.IndexOf(text[i]) != -1)
            {
               // Found a word - store it.
               if (Start != i)
                  ReturnStrings.Add(text.Substring(Start, i - Start).Trim(" ".ToCharArray()));
               Start = i + 1;

            }
         }
      }
      if (Start != text.Length)
         ReturnStrings.Add(text.Substring(Start, text.Length - Start).Trim(" ".ToCharArray()));

      // remove leading and trailing quote if necessary.
      for (int i = 0; i < ReturnStrings.Count; i++)
      {
         if (ReturnStrings[i][0] == '"' && ReturnStrings[i][ReturnStrings[i].Length - 1] == '"')
         {
            ReturnStrings[i] = ReturnStrings[i].Substring(1, ReturnStrings[i].Length - 2).Trim();
            if (ReturnStrings[i] == "")
            {
               ReturnStrings.RemoveAt(i);
               i--;
            }
         }
      }
      return ReturnStrings;
   }
   public int IndexNotOfAny(string text, char[] delimiters)
   {
      return IndexNotOfAny(text, delimiters, 0);
   }

   /// <summary>
   /// This method complements the string function IndexOfAny by
   /// providing a NOT version. Returns -1 if non of the specified
   /// characters are found in specified string.
   /// </summary>
   public int IndexNotOfAny(string text, char[] delimiters, int pos)
   {
      string DelimitersString = new string(delimiters);
      for (int i = pos; i < text.Length; i++)
      {
         if (DelimitersString.IndexOf(text[i]) == -1)
            return i;
      }
      return -1;
   }
   
   // Apsim isnt aware of unicode strings.
   private string UnicodeString(string text)
   {
      return Encoding.UTF8.GetString(Encoding.ASCII.GetBytes(text));
   }
}
```
        manager Remove all residues on a fixed date
          # Removal criteria
          date = 1-may  # Date to remove residues (dd-mmm)
          surfaceommodule = SurfaceOrganicMatter  # Name of your surface organic matter module
          on start_of_day:
```
         if today = date('[date]') then
            '[surfaceommodule]' tillage type = user_defined, f_incorp = 1.0 (), tillage_depth = 0.0 ()
         endif
```
      outputfile: filename=Simulation.out; title=Simulation
        variables
          variable:
            thisStation as Station
            thisYear as Year
            thisCrop as Crop
            flowering_das as Sunflower_FLDAS
            FloweringDAS as Maize_FLDAS
            maturity_das as Sunflower_MATDAS
            MaturityDAS as Maize_MATDAS
            dd/mm/yyyy as HarvestDate
            esw
            yield
            stover
            biomass
        events: event=harvesting
  factorial Factorials: active=1
    settings
    factor Crop
      targets: Target=/simulations/Simulation/paddock/Manager folder/Setup
      vars: thisCrop=Maize,Sunflower
      manager2 Setup
        thisCrop = maize  # Crop to simulate
        csvFile = Baseline_with_SM.csv  # CSV file of treatments
        thisYear = 2004  # The year of this simulation
        thisStation = Сарата  # Station Name
```csharp
using System;
using System.Collections.Generic;
using System.IO;
using ModelFramework;

public class Script 
{      
   [Link] public Simulation simulation;
   [Link] public Paddock paddock;
   [Input] DateTime Today; 
   [Param] string csvFile;
   [Param, Output] string thisCrop;
   [Param, Output] int thisYear;
   [Param, Output] string thisStation;
   
   private Dictionary<string, string> cultivar;
   private Dictionary<string, double> density;
   private double row_spacing = 500; //mm
   private double depth = 30; // sowing depth (mm)
   
   
   [EventHandler] public void OnInitialised()
   {
      // set up the dictionaries for crop-specific details
      cultivar = new Dictionary<string, string>();
      cultivar.Add("Maize", "SC601");
      cultivar.Add("Sunflower", "default");

      density = new Dictionary<string, double>(); // plants / sq meter
      density.Add("Maize", 4);
      density.Add("Sunflower", 3);

      // Read the table of sowing dates
      using (StreamReader sr = new StreamReader(csvFile))
      {
         List<string> headers = SplitStringHonouringQuotes(sr.ReadLine(), ",");
         var stationCol = headers.IndexOf("station");
         if (stationCol < 0) {throw new Exception("Missing station column");}
                
         var yearCol = headers.IndexOf("year");
         if (yearCol < 0) {throw new Exception("Missing year column");}

         var cropCol = headers.IndexOf("crop");
         if (cropCol < 0) {throw new Exception("Missing crop column");}

         while (!sr.EndOfStream)
         {
            string[] row = SplitStringHonouringQuotes(sr.ReadLine(), ",").ToArray();
            double rowYear = 0;
            Double.TryParse(row[yearCol], out rowYear);
            if (thisStation == row[stationCol] &&
                thisYear == rowYear &&
                thisCrop == row[cropCol]) {
               
               Console.WriteLine("Found row");
               //myCommands.Add(rows[cmdCol]);
            }
         }
      }
   }

   [EventHandler] public void OnPrepare()
   {

   }
   
   [EventHandler] public void OnPost()
   {
      Component cropModule = (Component) paddock.LinkByName(thisCrop);
      string plantStatus = "";
      cropModule.Get("plant_status", out plantStatus);
      if (plantStatus != "out") {
         string StageName = "";
         cropModule.Get("StageName", out StageName);
         if (StageName == "harvest_ripe" || plantStatus == "dead") {
            DoHarvestCrop();
         }
      }
   }
   
   [EventHandler, Description("Sow the crop")] public void DoSowCrop()
   {
      Console.WriteLine(Today.ToString("dd/MM/yyyy") + " Sowing Crop");
      SowType data = new SowType();
      data.Cultivar = cultivar[thisCrop];

      data.plants = density[thisCrop];
      data.sowing_depth = depth;
      data.row_spacing = row_spacing;
      string currentPaddock;
      
      Component cropModule = (Component) paddock.LinkByName(thisCrop);

      cropModule.Publish("Sow", data);
   }


   public void DoHarvestCrop()
   {
      Console.WriteLine(Today + " Harvesting Crop");
      HarvestType hdata = new HarvestType();
      hdata.Remove = 0.0;
      Component cropModule = (Component) paddock.LinkByName(thisCrop);
      cropModule.Publish("harvest", hdata);

      KillCropType kdata = new KillCropType();
      kdata.KillFraction = 0.0F;
      cropModule.Publish("killcrop", kdata);
      cropModule.Publish("end_crop");
   } 

   
/////////// Helpers   
   /// This method splits values on a comma but also honours double quotes
   /// ensuring something in double quotes is never split.
   ///     eg: if text = value1, "value 2, 2a", value3
   ///     then: words[0] = value1
   ///           words[1] = value2, 2a
   ///           words[2] = value3
   /// All values returned have been trimmed of spaces and double quotes.
   /// </summary>
   public List<string> SplitStringHonouringQuotes(string text, string delimiters)
   {
      List<string> ReturnStrings = new List<string>();
      if (text.Trim() == "")
         return ReturnStrings;

      bool InsideQuotes = false;
      int Start = IndexNotOfAny(text, " ".ToCharArray());
      for (int i = Start; i < text.Length; i++)
      {
         if (text[i] == '"')
            InsideQuotes = !InsideQuotes; // toggle

         else if (!InsideQuotes)
         {
            if (delimiters.IndexOf(text[i]) != -1)
            {
               // Found a word - store it.
               if (Start != i)
                  ReturnStrings.Add(text.Substring(Start, i - Start).Trim(" ".ToCharArray()));
               Start = i + 1;

            }
         }
      }
      if (Start != text.Length)
         ReturnStrings.Add(text.Substring(Start, text.Length - Start).Trim(" ".ToCharArray()));

      // remove leading and trailing quote if necessary.
      for (int i = 0; i < ReturnStrings.Count; i++)
      {
         if (ReturnStrings[i][0] == '"' && ReturnStrings[i][ReturnStrings[i].Length - 1] == '"')
         {
            ReturnStrings[i] = ReturnStrings[i].Substring(1, ReturnStrings[i].Length - 2).Trim();
            if (ReturnStrings[i] == "")
            {
               ReturnStrings.RemoveAt(i);
               i--;
            }
         }
      }
      return ReturnStrings;
   }
   public int IndexNotOfAny(string text, char[] delimiters)
   {
      return IndexNotOfAny(text, delimiters, 0);
   }

   /// <summary>
   /// This method complements the string function IndexOfAny by
   /// providing a NOT version. Returns -1 if non of the specified
   /// characters are found in specified string.
   /// </summary>
   public int IndexNotOfAny(string text, char[] delimiters, int pos)
   {
      string DelimitersString = new string(delimiters);
      for (int i = pos; i < text.Length; i++)
      {
         if (DelimitersString.IndexOf(text[i]) == -1)
            return i;
      }
      return -1;
   }
}
```
    factor Year
      targets: Target=/simulations/Simulation/clock
      vars
      clock 2004
        start_date = 01/04/2004  # Enter the start date of the simulation
        end_date = 31/12/2004  # Enter the end date of the simulation
      clock 2008
        start_date = 01/04/2008  # Enter the start date of the simulation
        end_date = 31/12/2008  # Enter the end date of the simulation
      clock 2010
        start_date = 01/04/2010  # Enter the start date of the simulation
        end_date = 31/12/2010  # Enter the end date of the simulation
      clock 2011
        start_date = 01/04/2011  # Enter the start date of the simulation
        end_date = 31/12/2011  # Enter the end date of the simulation
    folder Station
      folder Любашівка
        factor met
          targets: Target=/simulations/Simulation/met
          vars: filename=47.85_30.26.met
          metfile met: filename=47.85_30.26.met
        factor Script
          targets: Target=/simulations/Simulation/paddock/Manager folder/Setup
          vars: thisStation=47.85_30.26
          manager2 Setup
            thisCrop = maize  # Crop to simulate
            csvFile = Baseline_with_SM.csv  # CSV file of treatments
            thisStation = 46.01_29.76  # Station Name (lat_lng)
```csharp
using System;
using System.Text;

using System.Collections.Generic;
using System.IO;
using ModelFramework;

public class Script 
{      
   [Link] public Simulation simulation;
   [Link] public Paddock paddock;
   [Input] DateTime Today; 
   [Param] string csvFile;
   [Param, Output] string thisCrop;
   [Param, Output] string thisStation;
   [Output] int thisYear;
   
   private Dictionary<string, string> cultivar;
   private Dictionary<string, double> density;
   private double row_spacing = 500; //mm
   private double depth = 30; // sowing depth (mm)
   private DateTime datsow;   
   
   [EventHandler] public void OnInitialised()
   {
      // set up the dictionaries for crop-specific details
      cultivar = new Dictionary<string, string>();
      cultivar.Add("Maize", "SC601");
      cultivar.Add("Sunflower", "default");

      density = new Dictionary<string, double>(); // plants / sq meter
      density.Add("Maize", 4);
      density.Add("Sunflower", 3);
      
      bool found = false;

      Component clockModule = (Component) simulation.LinkByName("clock");
      clockModule.Get("year", out thisYear);
      
      // Read the table of sowing dates
      using (StreamReader sr = new StreamReader(csvFile))
      {
         List<string> headers = SplitStringHonouringQuotes(sr.ReadLine(), ",");
         var latCol = headers.IndexOf("Lat");
         if (latCol < 0) {throw new Exception("Missing Latitude");}
         
         var longCol = headers.IndexOf("Long");
         if (longCol < 0) {throw new Exception("Missing Longitude");}
                
         var yearCol = headers.IndexOf("year");
         if (yearCol < 0) {throw new Exception("Missing year column");}

         var cropCol = headers.IndexOf("crop");
         if (cropCol < 0) {throw new Exception("Missing crop column");}

         while (!sr.EndOfStream)
         {
            string[] row = SplitStringHonouringQuotes(sr.ReadLine(), ",").ToArray();
            double rowYear = 0;
            Double.TryParse(row[yearCol], out rowYear);
            
            var station = row[latCol].ToString() + "_" + row[longCol].ToString();
            if (thisStation == station &&
                thisYear == rowYear &&
                thisCrop == row[cropCol]) {
               
               Console.WriteLine("Found row");
               found = true;
               var dCol = headers.IndexOf("datsow");
               if (dCol < 0) {throw new Exception("Missing sowing date column");}

               datsow = DateTime.Parse(row[dCol]);
            }
         }
      }
      if (!found) {
         throw new Exception("No treatment data");
      }
   }

   [EventHandler] public void OnPrepare()
   {
      Console.WriteLine("Today = " + Today.ToString("dd/MM/yyyy") + " vs " + datsow.ToString("dd/MM/yyyy"));
      if (DateTime.Compare(datsow, Today) == 0) {
         DoSowCrop();
      }
   }
   
   [EventHandler] public void OnPost()
   {
      Component cropModule = (Component) paddock.LinkByName(thisCrop);
      string plantStatus = "";
      cropModule.Get("plant_status", out plantStatus);
      if (plantStatus != "out") {
         string StageName = "";
         cropModule.Get("StageName", out StageName);
         if (StageName == "harvest_ripe" || plantStatus == "dead") {
            DoHarvestCrop();
         }
      }
   }
   
   [EventHandler, Description("Sow the crop")] public void DoSowCrop()
   {
      Console.WriteLine(Today.ToString("dd/MM/yyyy") + " Sowing Crop");
      SowType data = new SowType();
      data.Cultivar = cultivar[thisCrop];

      data.plants = density[thisCrop];
      data.sowing_depth = depth;
      data.row_spacing = row_spacing;
      string currentPaddock;
      
      Component cropModule = (Component) paddock.LinkByName(thisCrop);

      cropModule.Publish("Sow", data);
   }


   public void DoHarvestCrop()
   {
      Console.WriteLine(Today + " Harvesting Crop");
      HarvestType hdata = new HarvestType();
      hdata.Remove = 0.0;
      Component cropModule = (Component) paddock.LinkByName(thisCrop);
      cropModule.Publish("harvest", hdata);

      KillCropType kdata = new KillCropType();
      kdata.KillFraction = 0.0F;
      cropModule.Publish("killcrop", kdata);
      cropModule.Publish("end_crop");
   } 

   
/////////// Helpers   
   /// This method splits values on a comma but also honours double quotes
   /// ensuring something in double quotes is never split.
   ///     eg: if text = value1, "value 2, 2a", value3
   ///     then: words[0] = value1
   ///           words[1] = value2, 2a
   ///           words[2] = value3
   /// All values returned have been trimmed of spaces and double quotes.
   /// </summary>
   public List<string> SplitStringHonouringQuotes(string text, string delimiters)
   {
      List<string> ReturnStrings = new List<string>();
      if (text.Trim() == "")
         return ReturnStrings;

      bool InsideQuotes = false;
      int Start = IndexNotOfAny(text, " ".ToCharArray());
      for (int i = Start; i < text.Length; i++)
      {
         if (text[i] == '"')
            InsideQuotes = !InsideQuotes; // toggle

         else if (!InsideQuotes)
         {
            if (delimiters.IndexOf(text[i]) != -1)
            {
               // Found a word - store it.
               if (Start != i)
                  ReturnStrings.Add(text.Substring(Start, i - Start).Trim(" ".ToCharArray()));
               Start = i + 1;

            }
         }
      }
      if (Start != text.Length)
         ReturnStrings.Add(text.Substring(Start, text.Length - Start).Trim(" ".ToCharArray()));

      // remove leading and trailing quote if necessary.
      for (int i = 0; i < ReturnStrings.Count; i++)
      {
         if (ReturnStrings[i][0] == '"' && ReturnStrings[i][ReturnStrings[i].Length - 1] == '"')
         {
            ReturnStrings[i] = ReturnStrings[i].Substring(1, ReturnStrings[i].Length - 2).Trim();
            if (ReturnStrings[i] == "")
            {
               ReturnStrings.RemoveAt(i);
               i--;
            }
         }
      }
      return ReturnStrings;
   }
   public int IndexNotOfAny(string text, char[] delimiters)
   {
      return IndexNotOfAny(text, delimiters, 0);
   }

   /// <summary>
   /// This method complements the string function IndexOfAny by
   /// providing a NOT version. Returns -1 if non of the specified
   /// characters are found in specified string.
   /// </summary>
   public int IndexNotOfAny(string text, char[] delimiters, int pos)
   {
      string DelimitersString = new string(delimiters);
      for (int i = pos; i < text.Length; i++)
      {
         if (DelimitersString.IndexOf(text[i]) == -1)
            return i;
      }
      return -1;
   }
   
   // Apsim isnt aware of unicode strings.
   private string UnicodeString(string text)
   {
      return Encoding.UTF8.GetString(Encoding.ASCII.GetBytes(text));
   }
}
```
      folder Сарата
        factor met
          targets: Target=/simulations/Simulation/met
          vars: filename=46.01_29.76.met
          metfile met: filename=47.85_30.26.met
        factor Script
          targets: Target=/simulations/Simulation/paddock/Manager folder/Setup
          vars: thisStation=46.01_29.76
          manager2 Setup: same as Factorials.Station.Любашівка.Script.Setup
      folder Сербка
        factor met
          targets: Target=/simulations/Simulation/met
          vars: filename=47.01_30.75.met
          metfile met: filename=47.85_30.26.met
        factor Script
          targets: Target=/simulations/Simulation/paddock/Manager folder/Setup
          vars: thisStation=47.01_30.75
          manager2 Setup: same as Factorials.Station.Любашівка.Script.Setup
      folder Ізмаїл
        factor met
          targets: Target=/simulations/Simulation/met
          vars: filename=45.36_28.85.met
          metfile met: filename=47.85_30.26.met
        factor Script
          targets: Target=/simulations/Simulation/paddock/Manager folder/Setup
          vars: thisStation=45.36_28.85
          manager2 Setup: same as Factorials.Station.Любашівка.Script.Setup
      folder Асканія-Нова
        factor met
          targets: Target=/simulations/Simulation/met
          vars: filename=46.45_33.88.met
          metfile met: filename=47.85_30.26.met
        factor Script
          targets: Target=/simulations/Simulation/paddock/Manager folder/Setup
          vars: thisStation=46.45_33.88
          manager2 Setup: same as Factorials.Station.Любашівка.Script.Setup
      folder Херсон
        factor met
          targets: Target=/simulations/Simulation/met
          vars: filename=46.63_32.57.met
          metfile met: filename=47.85_30.26.met
        factor Script
          targets: Target=/simulations/Simulation/paddock/Manager folder/Setup
          vars: thisStation=46.63_32.57
          manager2 Setup: same as Factorials.Station.Любашівка.Script.Setup
